# OpenSim document version 30000
ForwardTool drop_landing_trial:
  model_file: passive_dynamic_walker_walks.osim
  replace_force_set: false
  results_directory: \forward
  output_precision: 8
  initial_time: 0
  final_time: 20
  solve_for_equilibrium_for_auxiliary_states: true
  maximum_number_of_integrator_steps: 20000
  maximum_integrator_step_size: 1
  minimum_integrator_step_size: 1e-8
  integrator_error_tolerance: 1e-5
  use_specified_dt: false
  AnalysisSet Analyses:
    ForceReporter: start_time=0 end_time=0.4 step_interval=1 in_degrees=true include_constraint_forces=false
